# Cuarta Evaluación de Laboratorio de Matemática 4
# Tamashiro Palomino Christian Soichi | Código : 201412272
# Pregunta 1
H(t) :=
    1 if -2*π < t < -π
    -t/π if -π < t < 0
    t/π if 0 < t < π
    1 if π < t < 2*π
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# Como la Señal es par bn = 0
T := 2*π
w0 := 2*π/T
w0 → 1
a0 := 2/T*(integral(1, t = -2*π .. -π) + integral(-t/π, t = -π .. 0) + integral(t/π, t = 0 .. π) + integral(1, t = π .. 2*π)) → 3
an := 2/T*(integral(1*cos(n*t), t = -2*π .. -π) + integral(-t/π*cos(n*t), t = -π .. 0) + integral(t/π*cos(n*t), t = 0 .. π) + integral(1*cos(n*t), t = π .. 2*π)) → (2*sin(π*n)/n + 4*(cos(π*n/2)^2 - 1)/(π*n^2) + 2*sin(π*n)*(2*cos(π*n) - 1)/n)/π → (2*sin(π*n)/n + 2*sin(π*n)*(2*cos(π*n) - 1)/n + (4*cos(π*n/2)^2 - 4)/(π*n^2))/π  # error: This variable is undefined.
an simplify → (2*cos(π*n) + 2*π*n*sin(2*π*n) - 2)/(π^2*n^2)
